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/batch
! ANSYS input file written by Workbench version 2019 R3
! File used for geometry attach: F:\00TEMP\fsi-test-folder\test_error\test-fsi-tutorial_files\dp0\SYS\DM\SYS.agdb
/title,test-fsi-tutorial--Transient (A5)
/com,--- Data in consistent MKS units. See Solving Units in the help system for more information.
/units,MKS
/prep7
! Turn off shape checking because checks already performed inside WB mesher.
! See help system for more information.
SHPP,OFF,,NOWARN
etcon,set             ! allow ANSYS to choose best KEYOP's for 180x elements
/com,*********** Nodes for the whole assembly ***********
nblock,3,,388
(1i9,3e20.9e3)
        1     1.000000000E+01     1.000000000E-01     3.000000000E-01
        2     1.000000000E+01     2.000000000E-01     3.000000000E-01
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-1
/com,*********** Elements for Body 1 "solid" ***********
et,1,186
keyo,1,2,1          ! set full integration on SOLID186
eblock,19,solid,,40
(19i9)
        1        1        1        1        0        0        0        0       20        0        1       27      106      107      110       28       66       67       55
      202      350      351      203      207      294      271      206      201      295      296      272
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-1
/com,*********** Send User Defined Coordinate System(s) ***********
csys,0
toffst,273.15,  ! Temperature offset from absolute zero
/com,*********** Set Reference Temperature ***********
tref,22.
/com,*********** Send Materials ***********
MP,DENS,1,2550,	! kg m^-3
MP,EX,1,2500000,	! Pa
MP,NUXY,1,0.35,

!************************* Model Summary ********************
!solid,	Plate,	matid,	1
!************************* End Model Summary ********************
/com,*********** Fixed Supports ***********
CMBLOCK,_FIXEDSU,NODE,       23
(8i10)
        78        79        80        81        82        83        84        85
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cmsel,s,_FIXEDSU
d,all,all
nsel,all
/com,*********** Define Pressure Using Surface Effect Elements ***********
et,2,154
eblock,10,,,40
(15i9)
      149        2        2        2        0      106       27      110      107      202      203      351      350
      150        2        2        2        0       27       18      109      110      173      175      353      203
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-1
esel,s,type,,2
esel,all

*DIM,_loadvari78,TABLE,4,1,1,TIME,
! Time values
_loadvari78(1,0,1) = 0.
_loadvari78(2,0,1) = 0.5
_loadvari78(3,0,1) = 0.51
_loadvari78(4,0,1) = 10.
! Load values
_loadvari78(1,1,1) = 100.
_loadvari78(2,1,1) = 100.
_loadvari78(3,1,1) = 0.
_loadvari78(4,1,1) = 0.

/com,*********** Create FSI Flags ***********
CMBLOCK,FSIN_2  ,NODE,      303
(8i10)
         1         2         3         4         5         6         7         8
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SF,FSIN_2,FSIN,2
nsel,all
esel,all
fini
/com,****************************************************************************
/com,*************************    SOLUTION       ********************************
/com,****************************************************************************
/solu
antype,4                   ! transient analysis
nlgeom,on                  ! Turn on Large Deformation Effects
kbc,1                      ! stepped BC's
_thickRatio=  0     ! Ratio of thick parts in the model
eqsl,sparse,,,,,1
cntr,print,1               ! print out contact info and also make no initial contact an error
rstsuppress,none           ! don't suppress anything due to presense of FSI loading
dmpoption,emat,no             ! Don't combine emat file for DANSYS
dmpoption,esav,no             ! Don't combine esav file for DANSYS
cmwrite                    ! Export components due to presence of FSI loading
trnopt,full,,,,,hht        ! HHT time integration method
tintp,0.1 ! Numerical Damping
nldiag,cont,iter           ! print out contact info each equilibrium iteration
rescontrol,define,last,last,,dele	   ! Program Controlled
/com,****************************************************
/com,******************* SOLVE FOR LS 1 OF 1 ****************
esel,s,type,,2
nsle
sf,all,pres,%_loadvari78%
nsel,all
esel,all
esel,all
autots,off                 ! User turned off automatic time stepping
nsub,1,1,1
time,20.
timint,on                  ! Turn on time integration effects
outres,erase
outres,all,none
outres,nsol,all,
outres,rsol,all
outres,eangl,all
outres,etmp,all
outres,veng,all
outres,strs,all,
outres,srfs,all,
outres,bkstr,all,
outres,epel,all,
outres,eppl,all,
outres,cont,all,
outres,nldat,all,
outres,v,all,
outres,a,all,
stabilize,off                   ! Stabilization turned OFF by user
! *********** WB SOLVE COMMAND ***********
! check interactive state
*get,ANSINTER_,active,,int
*if,ANSINTER_,ne,0,then
/eof
*endif
solve
/com *************** Write FE CONNECTORS *********
CEWRITE,file,ce,,INTE
/com,****************************************************
/com,*************** FINISHED SOLVE FOR LS 1 *************
/post1
fini
